<?xml version="1.0"?>
<?xml-stylesheet type="text/xsl" href="http://jsbsim.sourceforge.net/JSBSim.xsl"?>

<fdm_config name="Boeing-P26" version="2.0" release="ALPHA"
   xmlns:xsi="http://www.w3.org/2001/XMLSchema-instance"
   xsi:noNamespaceSchemaLocation="http://jsbsim.sourceforge.net/JSBSim.xsd">

 <fileheader>
  <author> Aeromatic v 3.3.10 </author>
  <filecreationdate> 30 Mar 2019 </filecreationdate>
  <version>$Revision: 1.80 $</version>
  <description> Models a Boeing-P26. </description>
 </fileheader>

<!--
  File:     Boeing-P26.xml
  Inputs:
    name:          Boeing-P26
    type:          Single engine WWII Fighter, Military Trainer, Aerobatic, Air Racer
    stall speed:   65.00kts
    max weight:    3500.00 lb
    length:        23.70 ft
    wing:
     span:         28.00 ft
     area:         150.00 sq-ft
     mean chord:   5.60 ft
     aspect ratio: 5.00:1
     taper ratio:  2.00:1
     incidence:    1.00 degrees
     dihedral:     6.00 degrees
     sweep:        3.00 degrees

    no. engines:   1
    engine type:   Piston Engine
    engine layout: forward fuselage

    gear type:     taildragger
    steering type: steering
    retractable?:  no

  Outputs:
    wing loading:       23.33 lb/sq-ft
     - thickness ratio: 6.93%
    payload:            877.00 lbs
    CL-alpha:           8.10 per radian
    CL-0:               0.36
    CL-max:             1.63
    CD-0:               0.01
    K:                  0.06
    Mcrit:              0.75

    min. turn radius    206.51 ft
    max. turn rate:     0.58 deg/s
-->

 <metrics>
   <wingarea  unit="FT2">   150.00 </wingarea>
   <wingspan  unit="FT" >    28.00 </wingspan>
   <wing_incidence unit="DEG"> 1.00 </wing_incidence>
   <chord     unit="FT" >     5.60 </chord>
   <htailarea unit="FT2">    20.00 </htailarea>
   <htailarm  unit="FT" >     6.50 </htailarm>
   <vtailarea  unit="FT2">   15.00 </vtailarea>
   <vtailarm  unit="FT" >     4.80 </vtailarm>
   <location name="AERORP" unit="M">
      <x> -0.92 </x>
      <y>     0.00 </y>
      <z> -0.63 </z>
   </location>
   <location name="EYEPOINT" unit="IN">
     <x>    79.63 </x>
     <y>     0.00 </y>
     <z>    40.00 </z>
   </location>
   <location name="VRP" unit="IN">
     <x>     0.0 </x>
     <y>     0.0 </y>
     <z>     0.0 </z>
   </location>
 </metrics>

 <mass_balance>
   <ixx unit="SLUG*FT2">    974.45 </ixx>
   <iyy unit="SLUG*FT2">   1241.13 </iyy>
   <izz unit="SLUG*FT2">   2009.72 </izz>
   <emptywt unit="LBS" >   2196.00 </emptywt>
   <location name="CG" unit="M">
      <x> -0.92 </x>
      <y>     0.00 </y>
      <z> -0.63 </z>
   </location>
   <pointmass name="Payload">
    <description> 877.00 LBS should bring model up to entered max weight </description>
    <weight unit="LBS">180 </weight>
    <location name="POINTMASS" unit="M">
      <x> -0.92 </x>
      <y>     0.00 </y>
      <z> -0.63 </z>
   </location>
  </pointmass>
 </mass_balance>

 <propulsion>

   <engine file="R1340-27">
    <location unit="M">
      <x>   -3.31586 </x>
      <y>     0.00 </y>
      <z>     0.00 </z>
    </location>
    <orient unit="DEG">
      <pitch>     0.00 </pitch>
       <roll>     0.00 </roll>
        <yaw>     0.00 </yaw>
    </orient>
    <feed> 0 </feed>

    <thruster file="prop">
     <sense> 1 </sense>
     <location unit="M">
       <x>   -3.63365 </x>
       <y>     0.00 </y>
       <z>     0.00 </z>
     </location>
     <orient unit="DEG">
       <pitch>     0.00 </pitch>
        <roll>     0.00 </roll>
         <yaw>     0.00 </yaw>
     </orient>
    </thruster>
  </engine>

  <tank type="FUEL" number="0">
     <location unit="M">
      <x> -0.92 </x>
      <y>     0.00 </y>
      <z> -0.63 </z>
     </location>
     <capacity unit="LBS"> 200 </capacity>
     <contents unit="LBS"> 20 </contents>
  </tank>
 <!--
 <tank type="FUEL" number="1">
     <location unit="M">
     <x>   2.98544 </x>
     <y>     0.00 </y>
     <z>    -0.082451 </z>
     </location>
     <capacity unit="LBS"> 213.50 </capacity>
     <contents unit="LBS"> 106.75 </contents>
  </tank> -->

 </propulsion>

 <ground_reactions>

  <contact type="BOGEY" name="TAIL">
    <location unit="M">
      <x>   2.73778 </x>
      <y>     0.00 </y>
      <z>   -0.55 </z>
    </location>
    <static_friction>  0.80 </static_friction>
    <dynamic_friction> 0.50 </dynamic_friction>
    <rolling_friction> 0.02 </rolling_friction>
   <spring_coeff unit="LBS/FT">      3000 </spring_coeff>
   <damping_coeff unit="LBS/FT/SEC"> 7000.00 </damping_coeff>
 <damping_coeff_rebound unit="LBS/FT/SEC"> 10000 </damping_coeff_rebound>
    <max_steer unit="DEG"> -5.00 </max_steer>
    <brake_group> NONE </brake_group>
    <retractable> 0 </retractable>
  </contact>

  <contact type="BOGEY" name="LEFT_MAIN">
    <location unit="M">
      <x>  -2.1721 </x>
      <y>  -0.793 </y>
      <z>   -1.71 </z>
    </location>
    <static_friction>  0.80 </static_friction>
    <dynamic_friction> 0.50 </dynamic_friction>
    <rolling_friction> 0.02 </rolling_friction>
      <spring_coeff unit="LBS/FT"> 1200 </spring_coeff>
      <damping_coeff unit="LBS/FT/SEC"> 400 </damping_coeff>
      <damping_coeff_rebound unit="LBS/FT/SEC"> 3000 </damping_coeff_rebound>
    <max_steer unit="DEG">0</max_steer>
    <brake_group> LEFT </brake_group>
    <retractable> 0 </retractable>
  </contact>

  <contact type="BOGEY" name="RIGHT_MAIN">
    <location unit="M">
      <x>   -2.1721 </x>
      <y>   0.793 </y>
      <z>   -1.71 </z>
    </location>
    <static_friction>  0.80 </static_friction>
    <dynamic_friction> 0.50 </dynamic_friction>
    <rolling_friction> 0.02 </rolling_friction>
      <spring_coeff unit="LBS/FT"> 1200 </spring_coeff>
      <damping_coeff unit="LBS/FT/SEC"> 400 </damping_coeff>
      <damping_coeff_rebound unit="LBS/FT/SEC"> 3000 </damping_coeff_rebound>
    <max_steer unit="DEG">0</max_steer>
    <brake_group> RIGHT </brake_group>
    <retractable> 0 </retractable>
  </contact>

  <contact type="STRUCTURE" name="LEFT_WING">
    <location unit="M">
     <x>  -1.85734 </x>
     <y>  -4.21206 </y>
     <z>   -0.096445 </z>
    </location>
   <static_friction>  1 </static_friction>
   <dynamic_friction> 1 </dynamic_friction>
      <spring_coeff unit="LBS/FT"> 1200 </spring_coeff>
      <damping_coeff unit="LBS/FT/SEC"> 400 </damping_coeff>
      <damping_coeff_rebound unit="LBS/FT/SEC"> 3000 </damping_coeff_rebound>
  </contact>

  <contact type="STRUCTURE" name="RIGHT_WING">
    <location unit="M">
     <x>  -1.85734 </x>
     <y>   4.21206 </y>
     <z>    -0.096445 </z>
    </location>
   <static_friction>  1 </static_friction>
   <dynamic_friction> 1 </dynamic_friction>
   <spring_coeff unit="LBS/FT">      4000 </spring_coeff>
   <damping_coeff unit="LBS/FT/SEC"> 7000.00 </damping_coeff>
 <damping_coeff_rebound unit="LBS/FT/SEC"> 10000 </damping_coeff_rebound>
  </contact>

  <contact type="STRUCTURE" name="TW_HOUSING">
    <location unit="M">
     <x>  2.50446 </x>
     <y>   0.0 </y>
     <z>  -0.340479 </z>
    </location>
   <static_friction>  1 </static_friction>
   <dynamic_friction> 1 </dynamic_friction>
   <spring_coeff unit="LBS/FT">      4000 </spring_coeff>
   <damping_coeff unit="LBS/FT/SEC"> 7000.00 </damping_coeff>
 <damping_coeff_rebound unit="LBS/FT/SEC"> 10000 </damping_coeff_rebound>
  </contact>

  <contact type="STRUCTURE" name="LW_HOUSING">
    <location unit="M">
     <x>  -2.56494 </x>
     <y>  -0.780301 </y>
     <z>  -0.780301 </z>
    </location>
   <static_friction>  1 </static_friction>
   <dynamic_friction> 1 </dynamic_friction>
   <spring_coeff unit="LBS/FT">      2000 </spring_coeff>
   <damping_coeff unit="LBS/FT/SEC"> 7000.00 </damping_coeff>
 <damping_coeff_rebound unit="LBS/FT/SEC"> 10000 </damping_coeff_rebound>
  </contact>

  <contact type="STRUCTURE" name="RW_HOUSING">
    <location unit="M">
     <x>  -2.56494 </x>
     <y>   0.780301 </y>
     <z>  -1.40098 </z>
    </location>
   <static_friction>  1 </static_friction>
   <dynamic_friction> 1 </dynamic_friction>
   <spring_coeff unit="LBS/FT">      2000 </spring_coeff>
   <damping_coeff unit="LBS/FT/SEC"> 7000.00 </damping_coeff>
 <damping_coeff_rebound unit="LBS/FT/SEC"> 10000 </damping_coeff_rebound>
  </contact>

  <contact type="STRUCTURE" name="LOWER_COWL">
    <location unit="M">
     <x>  -3.28859 </x>
     <y>   0.0 </y>
     <z>  -0.606219 </z>
    </location>
   <static_friction>  1 </static_friction>
   <dynamic_friction> 1 </dynamic_friction>
   <spring_coeff unit="LBS/FT">      2000 </spring_coeff>
   <damping_coeff unit="LBS/FT/SEC"> 7000.00 </damping_coeff>
 <damping_coeff_rebound unit="LBS/FT/SEC"> 10000 </damping_coeff_rebound>
  </contact>

    <contact type="STRUCTURE" name="UPPER_COWEL">
    <location unit="M">
     <x>  -3.32845 </x>
     <y>   0.0 </y>
     <z>  0.565679 </z>
    </location>
   <static_friction>  1 </static_friction>
   <dynamic_friction> 1 </dynamic_friction>
   <spring_coeff unit="LBS/FT">      2000 </spring_coeff>
   <damping_coeff unit="LBS/FT/SEC"> 7000.00 </damping_coeff>
 <damping_coeff_rebound unit="LBS/FT/SEC"> 10000 </damping_coeff_rebound>
  </contact>

    <contact type="STRUCTURE" name="LEFT_BLADE">
    <location unit="M">
     <x>  -3.4793 </x>
     <y>   -1.40068 </y>
     <z>  -0.01558 </z>
    </location>
   <static_friction>  1 </static_friction>
   <dynamic_friction> 1 </dynamic_friction>
   <spring_coeff unit="LBS/FT">      2000 </spring_coeff>
   <damping_coeff unit="LBS/FT/SEC"> 7000.00 </damping_coeff>
 <damping_coeff_rebound unit="LBS/FT/SEC"> 10000 </damping_coeff_rebound>
  </contact>

    <contact type="STRUCTURE" name="RIGHT_BLADE">
    <location unit="M">
     <x>  -3.4729 </x>
     <y>   1.40068 </y>
     <z>  0.026846 </z>
    </location>
   <static_friction>  1 </static_friction>
   <dynamic_friction> 1 </dynamic_friction>
   <spring_coeff unit="LBS/FT">      2000 </spring_coeff>
   <damping_coeff unit="LBS/FT/SEC"> 7000.00 </damping_coeff>
 <damping_coeff_rebound unit="LBS/FT/SEC"> 10000 </damping_coeff_rebound>
  </contact>

   <contact type="STRUCTURE" name="WING_TOWER">
    <location unit="M">
     <x>  -2.1577 </x>
     <y>   0.142275 </y>
     <z>  1.48801 </z>
    </location>
   <static_friction>  1 </static_friction>
   <dynamic_friction> 1 </dynamic_friction>
   <spring_coeff unit="LBS/FT">      2000 </spring_coeff>
   <damping_coeff unit="LBS/FT/SEC"> 7000.00 </damping_coeff>
 <damping_coeff_rebound unit="LBS/FT/SEC"> 10000 </damping_coeff_rebound>
  </contact>

    <contact type="STRUCTURE" name="REAR_COCKPIT">
    <location unit="M">
     <x>  -0.956398 </x>
     <y>   0.0 </y>
     <z>  1.13722 </z>
    </location>
   <static_friction>  1 </static_friction>
   <dynamic_friction> 1 </dynamic_friction>
   <spring_coeff unit="LBS/FT">      2000 </spring_coeff>
   <damping_coeff unit="LBS/FT/SEC"> 7000.00 </damping_coeff>
 <damping_coeff_rebound unit="LBS/FT/SEC"> 10000 </damping_coeff_rebound>
  </contact>

    <contact type="STRUCTURE" name="ANTENNA">
    <location unit="M">
     <x>  2.98544 </x>
     <y>   0.0 </y>
     <z>  1.62422 </z>
    </location>
   <static_friction>  1 </static_friction>
   <dynamic_friction> 1 </dynamic_friction>
   <spring_coeff unit="LBS/FT">      2000 </spring_coeff>
   <damping_coeff unit="LBS/FT/SEC"> 7000.00 </damping_coeff>
 <damping_coeff_rebound unit="LBS/FT/SEC"> 10000 </damping_coeff_rebound>
  </contact>

    <contact type="STRUCTURE" name="REAR_VTAIL">
    <location unit="M">
     <x>  3.57056 </x>
     <y>   0.0 </y>
     <z>  0.588142 </z>
    </location>
   <static_friction>  1 </static_friction>
   <dynamic_friction> 1 </dynamic_friction>
   <spring_coeff unit="LBS/FT">      2000 </spring_coeff>
   <damping_coeff unit="LBS/FT/SEC"> 7000.00 </damping_coeff>
 <damping_coeff_rebound unit="LBS/FT/SEC"> 10000 </damping_coeff_rebound>
  </contact>

     <contact type="STRUCTURE" name="LOWER_VTAIL">
    <location unit="M">
     <x>  3.32823 </x>
     <y>   0.0 </y>
     <z>  -0.070666 </z>
    </location>
   <static_friction>  1 </static_friction>
   <dynamic_friction> 1 </dynamic_friction>
   <spring_coeff unit="LBS/FT">      2000 </spring_coeff>
   <damping_coeff unit="LBS/FT/SEC"> 7000.00 </damping_coeff>
 <damping_coeff_rebound unit="LBS/FT/SEC"> 10000 </damping_coeff_rebound>
  </contact>

     <contact type="STRUCTURE" name="RIGHT_HSTAB">
    <location unit="M">
     <x>  2.63029 </x>
     <y>   1.46039 </y>
     <z>  0.094921 </z>
    </location>
   <static_friction>  1 </static_friction>
   <dynamic_friction> 1 </dynamic_friction>
   <spring_coeff unit="LBS/FT">      2000 </spring_coeff>
   <damping_coeff unit="LBS/FT/SEC"> 7000.00 </damping_coeff>
 <damping_coeff_rebound unit="LBS/FT/SEC"> 10000 </damping_coeff_rebound>
  </contact>

     <contact type="STRUCTURE" name="LEFT_HSTAB">
    <location unit="M">
     <x>  2.63029 </x>
     <y>   -1.46039 </y>
     <z>  0.094921 </z>
    </location>
   <static_friction>  1 </static_friction>
   <dynamic_friction> 1 </dynamic_friction>
   <spring_coeff unit="LBS/FT">      2000 </spring_coeff>
   <damping_coeff unit="LBS/FT/SEC"> 7000.00 </damping_coeff>
 <damping_coeff_rebound unit="LBS/FT/SEC"> 10000 </damping_coeff_rebound>
  </contact>


 </ground_reactions>

 <system file="Conventional Controls.xml"/>
 <system file="Landing Gear.xml"/>
 <system file="Flaps.xml"/>

 <flight_control name="FCS: Boeing-P26">

 </flight_control>

 <aerodynamics>

  <axis name="LIFT">

    <function name="aero/force/Lift_propwash">
      <description>Delta lift due to propeller induced velocity</description>
      <product>
         <property>propulsion/engine[0]/thrust-coefficient</property>
          <property>aero/qbar-psf</property>
          <property>metrics/Sw-sqft</property>
          <table>
            <independentVar lookup="row">aero/alpha-rad</independentVar>
            <independentVar lookup="column">fcs/flap-pos-deg</independentVar>
            <tableData>
                     0.0     60.0
              -0.45  0.000   0.000
               0.00  0.074   0.196
               0.16  0.336   0.895
               0.32  0.000   0.000
            </tableData>
          </table>
      </product>
    </function>

    <!-- Lift above 0.85 and below -0.85 is generalised -->
    <function name="aero/force/Lift_alpha">
      <description>Lift due to alpha</description>
      <product>
          <property>aero/qbar-psf</property>
          <property>metrics/Sw-sqft</property>
          <table>
            <independentVar lookup="row">aero/alpha-rad</independentVar>
            <tableData>
              -1.57  0.0000
              -1.22 -0.5983
              -1.05 -0.8060
              -0.88 -0.9307
              -0.64 -0.5094
              -0.20 -1.2735
               0.00  0.3577
               0.16  1.6313
               0.60  0.8671
               0.88  1.0693
               1.05  0.9260
               1.22  0.6873
               1.57  0.0000
            </tableData>
          </table>
      </product>
    </function>

    <function name="aero/force/Lift_pitch_rate">
        <description>Lift due to pitch rate</description>
        <product>
          <property>aero/qbar-psf</property>
          <property>metrics/Sw-sqft</property>
          <property>velocities/q-aero-rad_sec</property>
          <property>aero/ci2vel</property>
          <value> 1.2617 </value>
        </product>
      </function>

      <function name="aero/force/Lift_alpha_rate">
        <description>Lift due to alpha rate</description>
        <product>
           <property>aero/qbar-psf</property>
           <property>metrics/Sw-sqft</property>
           <property>aero/alphadot-rad_sec</property>
           <property>aero/ci2vel</property>
           <value> 0.7210 </value>
        </product>
      </function>

    <function name="aero/force/Lift_elevator">
       <description>Lift due to Elevator Deflection</description>
       <product>
           <property>aero/qbar-psf</property>
           <property>metrics/Sw-sqft</property>
           <property>fcs/elevator-pos-rad</property>
           <value> 0.3576 </value>
       </product>
    </function>

    <function name="aero/force/Lift_flap">
       <description>Delta Lift due to flaps</description>
       <product>
           <property>aero/qbar-psf</property>
           <property>metrics/Sw-sqft</property>
           <property>fcs/flap-pos-deg</property>
           <value> 0.0092 </value>
       </product>
    </function>


  </axis>

  <axis name="DRAG">

    <!-- CD0 is based on fuselage, wing, horizontal- en vertical tail -->
    <!-- Antennas, struts and wires are not taken into account        -->
    <!-- CD for gear (fixed and retractable) is defined below         -->
    <function name="aero/force/Drag_minimum">
       <description>Minimum drag</description>
       <product>
          <property>aero/qbar-psf</property>
          <property>metrics/Sw-sqft</property>
          <value> 0.0149 </value>
       </product>
    </function>

    <function name="aero/force/Drag_alpha">
       <description>Drag due to alpha</description>
       <product>
          <property>aero/qbar-psf</property>
          <property>metrics/Sw-sqft</property>
          <table>
            <independentVar lookup="row">aero/alpha-rad</independentVar>
            <tableData>
             -1.57    1.4093
             -0.16    0.0580
              0.00    0.0000
              0.16    0.0580
              1.57    1.4093
            </tableData>
          </table>
       </product>
    </function>

    <function name="aero/force/Drag_induced">
       <description>Induced drag</description>
         <product>
           <property>aero/qbar-psf</property>
           <property>metrics/Sw-sqft</property>
           <property>aero/cl-squared</property>
           <value> 0.0637 </value>
         </product>
    </function>

    <function name="aero/force/Drag_mach">
       <description>Drag due to mach</description>
        <product>
          <property>aero/qbar-psf</property>
          <property>metrics/Sw-sqft</property>
          <table>
            <independentVar lookup="row">velocities/mach</independentVar>
            <tableData>
                0.00    0.0000
                0.75    0.0000
                1.10    0.0230
                1.80    0.0150
            </tableData>
          </table>
        </product>
    </function>

    <function name="aero/force/Drag_beta">
       <description>Drag due to sideslip</description>
       <product>
          <property>aero/qbar-psf</property>
          <property>metrics/Sw-sqft</property>
          <table>
            <independentVar lookup="row">aero/beta-rad</independentVar>
            <tableData>
              -1.57    1.2300
              -0.26    0.0500
               0.00    0.0000
               0.26    0.0500
               1.57    1.2300
            </tableData>
          </table>
       </product>
    </function>

    <function name="aero/force/Drag_elevator">
       <description>Drag due to Elevator Deflection</description>
       <product>
           <property>aero/qbar-psf</property>
           <property>metrics/Sw-sqft</property>
           <abs><property>fcs/elevator-pos-rad</property></abs>
           <value> 0.0400 </value>
       </product>
    </function>

    <function name="aero/force/Drag_gear">
       <description>Drag due to gear</description>
         <product>
           <property>aero/qbar-psf</property>
           <property>metrics/Sw-sqft</property>
           <value> 0.0040 </value>
         </product>
    </function>

    <function name="aero/force/Drag_flap">
       <description>Drag due to flaps</description>
         <product>
           <property>aero/qbar-psf</property>
           <property>metrics/Sw-sqft</property>
           <property>fcs/flap-pos-deg</property>
           <value> 0.0012 </value>
         </product>
    </function>


  </axis>

  <axis name="SIDE">

    <function name="aero/force/Side_beta">
       <description>Side force due to beta</description>
       <product>
           <property>aero/qbar-psf</property>
           <property>metrics/Sw-sqft</property>
           <property>aero/beta-rad</property>
           <value> -0.4652 </value>
       </product>
    </function>
    <function name="aero/force/Side_roll_rate">
       <description>Side force due to roll rate</description>
       <product>
           <property>aero/qbar-psf</property>
           <property>metrics/Sw-sqft</property>
           <property>aero/bi2vel</property>
           <property>velocities/p-aero-rad_sec</property>
           <table>
             <independentVar lookup="row">aero/Re</independentVar>
             <tableData>
                 3914955   0.3016
                 4306451   0.0265
                 5872433   0.0118
                 7833442   0.0066
             </tableData>
           </table>
       </product>
    </function>

    <function name="aero/force/Side_yaw_rate">
       <description>Side force due to yaw rate</description>
       <product>
           <property>aero/qbar-psf</property>
           <property>metrics/Sw-sqft</property>
           <property>aero/bi2vel</property>
           <property>velocities/r-aero-rad_sec</property>
           <value> 0.1595 </value>
       </product>
    </function>

    <function name="aero/force/Side_rudder">
       <description>Side force due to rudder</description>
       <product>
           <property>aero/qbar-psf</property>
           <property>metrics/Sw-sqft</property>
           <property>fcs/rudder-pos-rad</property>
           <value> 0.1407 </value>
       </product>
    </function>

  </axis>

  <axis name="PITCH">

    <function name="aero/moment/Pitch_propwash">
      <description>Pitch moment due to propeller induced velocity</description>
      <product>
          <property>propulsion/engine[0]/thrust-coefficient</property>
          <property>aero/qbar-psf</property>
          <property>metrics/Sw-sqft</property>
          <property>metrics/bw-ft</property>
          <table>
            <independentVar lookup="row">aero/alpha-rad</independentVar>
            <independentVar lookup="column">fcs/flap-pos-deg</independentVar>
            <tableData>
                     0.0     60.0
              -0.01  0.000   0.000
               0.00 -0.011  -0.030
               0.16 -0.052  -0.139
               0.21  0.000   0.000
            </tableData>
          </table>
      </product>
    </function>

    <function name="aero/moment/Pitch_alpha">
       <description>Pitch moment due to alpha</description>
       <product>
           <property>aero/qbar-psf</property>
           <property>metrics/Sw-sqft</property>
           <property>metrics/cbarw-ft</property>
           <property>aero/alpha-rad</property>
           <value> -0.5000 </value>
       </product>
    </function>

    <function name="aero/moment/Pitch_elevator">
       <description>Pitch moment due to elevator</description>
       <product>
          <property>aero/qbar-psf</property>
          <property>metrics/Sw-sqft</property>
          <property>metrics/cbarw-ft</property>
          <property>fcs/elevator-pos-rad</property>
          <table>
            <independentVar lookup="row">velocities/mach</independentVar>
            <tableData>
              0.0    -1.0000
              2.0    -0.2500
            </tableData>
          </table>
       </product>
    </function>

    <function name="aero/moment/Pitch_damp">
       <description>Pitch moment due to pitch rate</description>
       <product>
           <property>aero/qbar-psf</property>
           <property>metrics/Sw-sqft</property>
           <property>metrics/cbarw-ft</property>
           <property>aero/ci2vel</property>
           <property>velocities/q-aero-rad_sec</property>
           <value> -15.0000 </value>
       </product>
    </function>

    <function name="aero/moment/Pitch_alphadot">
       <description>Pitch moment due to alpha rate</description>
       <product>
           <property>aero/qbar-psf</property>
           <property>metrics/Sw-sqft</property>
           <property>metrics/cbarw-ft</property>
           <property>aero/ci2vel</property>
           <property>aero/alphadot-rad_sec</property>
           <value> -7.0000 </value>
       </product>
    </function>

  </axis>

  <axis name="ROLL">

    <function name="aero/moment/Roll_differential_propwash">
       <description>Roll moment due to differential propwash</description>
       <product>
           <property>propulsion/engine[0]/thrust-coefficient</property>
           <property>aero/qbar-psf</property>
           <property>metrics/Sw-sqft</property>
           <property>metrics/bw-ft</property>
           <property>aero/alpha-rad</property>
           <value> 0.2569 </value>
       </product>
    </function>

    <function name="aero/moment/Roll_beta">
       <description>Roll moment due to beta</description>
       <product>
           <property>aero/qbar-psf</property>
           <property>metrics/Sw-sqft</property>
           <property>metrics/bw-ft</property>
           <property>aero/beta-rad</property>
           <property>fcs/gear-no-wow</property>
           <table>
             <independentVar lookup="row">aero/alpha-rad</independentVar>
             <independentVar lookup="column">aero/Re</independentVar>
             <tableData>
                          3914955  4306451  5872433  7833442
                 -0.0349  -0.5512  -0.2720  -0.2571  -0.2519
                  0.3491  -0.7942  -0.3188  -0.3053  -0.3028
             </tableData>
           </table>
       </product>
    </function>

    <function name="aero/moment/Roll_damp">
       <description>Roll moment due to roll rate</description>
       <product>
           <property>aero/qbar-psf</property>
           <property>metrics/Sw-sqft</property>
           <property>metrics/bw-ft</property>
           <property>aero/bi2vel</property>
           <property>velocities/p-aero-rad_sec</property>
           <value> -1.3941 </value>
       </product>
    </function>

    <function name="aero/moment/Roll_yaw">
       <description>Roll moment due to yaw rate</description>
       <product>
           <property>aero/qbar-psf</property>
           <property>metrics/Sw-sqft</property>
           <property>metrics/bw-ft</property>
           <property>aero/bi2vel</property>
           <property>velocities/r-aero-rad_sec</property>
           <table>
             <independentVar lookup="row">aero/alpha-rad</independentVar>
             <independentVar lookup="column">aero/Re</independentVar>
             <tableData>
                          3914955  4306451  5872433  7833442
                 -0.0349   0.0131   0.0131   0.0131   0.0131
                  0.3491   4.0725   0.7903   0.7903   0.7903
             </tableData>
           </table>
       </product>
    </function>

    <function name="aero/moment/Roll_aileron">
       <description>Roll moment due to aileron</description>
       <product>
          <property>aero/qbar-psf</property>
          <property>metrics/Sw-sqft</property>
          <property>metrics/bw-ft</property>
          <property>fcs/left-aileron-pos-rad</property>
           <table>
            <independentVar lookup="row">velocities/mach</independentVar>
            <tableData>
              0.0    0.1800
              2.0    0.0450
            </tableData>
          </table>
       </product>
    </function>

    <function name="aero/moment/Roll_rudder">
       <description>Roll moment due to rudder</description>
       <product>
           <property>aero/qbar-psf</property>
           <property>metrics/Sw-sqft</property>
           <property>metrics/bw-ft</property>
           <property>fcs/rudder-pos-rad</property>
           <value> 0.0100 </value>
       </product>
    </function>

  </axis>

  <axis name="YAW">

    <!-- Stall initiator -->
    <function name="aero/moment/Yaw_alpha">
       <description>Yaw moment due to alpha</description>
       <product>
           <property>aero/qbar-psf</property>
           <property>metrics/Sw-sqft</property>
           <property>metrics/bw-ft</property>
           <property>aero/alpha-rad</property>
           <property>fcs/gear-no-wow</property>
           <table>
             <independentVar lookup="row">aero/beta-rad</independentVar>
             <independentVar lookup="column">aero/Re</independentVar>
             <tableData>
                          3914955  4306451
                 -0.3491  -0.05000   0.0000
                  0.3491   0.05000   0.0000
             </tableData>
           </table>
       </product>
    </function>

    <function name="aero/moment/Yaw_beta">
       <description>Yaw moment due to beta</description>
       <product>
           <property>aero/qbar-psf</property>
           <property>metrics/Sw-sqft</property>
           <property>metrics/bw-ft</property>
           <property>aero/beta-rad</property>
           <value> 0.0383 </value>
       </product>
    </function>

    <function name="aero/moment/Yaw_roll_rate">
       <description>Yaw moment due to roll rate</description>
       <product>
           <property>aero/qbar-psf</property>
           <property>metrics/Sw-sqft</property>
           <property>metrics/bw-ft</property>
           <property>aero/bi2vel</property>
           <property>velocities/p-rad_sec</property>
           <table>
             <independentVar lookup="row">aero/Re</independentVar>
             <tableData>
                 3914955  -0.0517
                 4306451  -0.0045
                 5872433  -0.0020
                 7833442  -0.0011
             </tableData>
           </table>
       </product>
    </function>

    <function name="aero/moment/Yaw_damp">
       <description>Yaw moment due to yaw rate</description>
       <product>
           <property>aero/qbar-psf</property>
           <property>metrics/Sw-sqft</property>
           <property>metrics/bw-ft</property>
           <property>aero/bi2vel</property>
           <property>velocities/r-aero-rad_sec</property>
           <value> -0.0261 </value>
       </product>
    </function>

    <function name="aero/moment/Yaw_rudder">
       <description>Yaw moment due to rudder</description>
       <product>
           <property>aero/qbar-psf</property>
           <property>metrics/Sw-sqft</property>
           <property>metrics/bw-ft</property>
           <property>fcs/rudder-pos-rad</property>
           <value> -0.0241 </value>
       </product>
    </function>

    <function name="aero/moment/Yaw_aileron">
       <description>Adverse yaw</description>
       <product>
           <property>aero/qbar-psf</property>
           <property>metrics/Sw-sqft</property>
           <property>metrics/bw-ft</property>
           <property>fcs/left-aileron-pos-rad</property>
           <value> -0.0030 </value>
       </product>
    </function>

  </axis>

 </aerodynamics>

 <external_reactions>
 </external_reactions>

</fdm_config>
