<?xml version="1.0"?>

<!--
  File:     R-1340-33.xml
  Author:   AeromatiC++ v 3.3.10

  See: http://wiki.flightgear.org/JSBSim_Engines#FGPiston

  Inputs:
    name:           R-1340-33
    type:           Piston Engine
    power:          600 hp
-->

<piston_engine name="R-1340-33">
  <minmp unit="INHG">         10.0 </minmp>
  <maxmp unit="INHG">         28.5 </maxmp>
    <displacement unit="IN3"> 1,344 </displacement>
  <maxhp>        600 </maxhp>
  <cycles>         4.0 </cycles>
  <idlerpm>      500.0 </idlerpm>
  <maxrpm>      2800.0 </maxrpm>
  <sparkfaildrop>  0.1 </sparkfaildrop>
  <volumetric-efficiency> 0.85 </volumetric-efficiency>
  <man-press-lag> 0.1 </man-press-lag>
  <static-friction  unit="HP"> 3 </static-friction>
  <starter-torque> 480 </starter-torque>
  <starter-rpm> 1400 </starter-rpm>
 <!-- Defining <bsfc> over-rides the built-in horsepower calculations -->
 <!--<bsfc>           0.45 </bsfc>-->
  <stroke unit="IN"> 5.75  </stroke>
  <bore unit="IN">   5.75 </bore>
  <cylinders>        9  </cylinders>
  <compression-ratio> 6 </compression-ratio>
</piston_engine>
